R := 1000
R_g := 1000
1 + 2*R/R_g = 3
5 V*sqrt(2) = 7.07107 V
4.4 - 0.3 = 4.1
4.1/2.8 = 1.46429
3.7 - 1.2 = 2.5
2.6/1.4 = 1.85714
# 1V rms
out := (2.385 - 1.468)/sqrt(2) = 0.648417
in := 1
(2.9594 - 1.8446)/2 = 0.5574
in/out = 1.54222
out/in = 0.648417
2.9594 - 0.557 = 2.4024
# 2V rms
(2.8721 - 1.7508)/2 = 0.56065
out := (2.934 - 1.187)/sqrt(2) = 1.23532
2.8721 - 0.561 = 2.3111
in := 2
in/out = 1.61902
out/in = 0.617658
(3.0167 - 1.9046)/2 = 0.55605
3.0167 - 0.556 = 2.4607
# 3V rms
out := (3.470 - 0.905)/sqrt(2) = 1.81373
3.04 - 0.56 = 2.48
in := 3
in/out = 1.65405
out/in = 0.604576
# 4V rms
5 V/(4 kΩ) = 1.25 mA
out := (4.017 - 0.619)/sqrt(2) = 2.40275
in := 4
in/out = 1.66476
out/in = 0.600687
# 5V rms
out := (4.558 - 0.335)/sqrt(2) = 2.98611
in := 5
in/out = 1.67442
out/in = 0.597222
# 3V rms
out := (2.756 - 2.246)/sqrt(2) = 0.360624
in := 0.058
in/out = 0.160832
out/in = 6.21766
# 4V rms
out := (2.833 - 2.169)/sqrt(2) = 0.469519
in := 0.078
in/out = 0.166127
out/in = 6.01947
# 5V rms
out := (2.908 - 2.0951)/sqrt(2) = 0.574807
in := 0.098
in/out = 0.170492
out/in = 5.86538
