# Page 707: 1, 2, 5
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T := 10
ω := 2*π/10
a_0 := 2/T*(integral(0, t = -5 .. 0) + integral(1, t = 0 .. 5)) = 1
a_k := 2/T*(integral(0*cos(k*ω*t), t = -5 .. 0) + integral(1*cos(k*ω*t), t = 0 .. 5)) simplify → sin(π*k)/(π*k)
b_k := 2/T*(integral(0*sin(k*ω*t), t = -5 .. 0) + integral(1*sin(k*ω*t), t = 0 .. 5)) simplify → 2*sin(π*k/2)^2/(π*k)
f(t) := 1/2*a_0 + sum(a_k*cos(k*ω*t), k = 1 .. 5) + sum(b_k*sin(k*ω*t), k = 1 .. 5) float, 2 → 0.13*sin(3.1*t) + 0.21*sin(1.9*t) + 0.64*sin(0.63*t) + 0.5
# [plot: f(t) vs t]
f(t) → 0.13*sin(3.1*t) + 0.21*sin(1.9*t) + 0.64*sin(0.63*t) + 0.5
THD := 10*log((0.21^2 + 0.64^2)/0.13^2) = 14.2888
THD := sqrt(□)
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THD := 10*log((0.01^2 + 0.005^2)/2^2) = -45.0515
THD_2 := sqrt(0.01^2 + 0.005^2)/2 = 0.00559017
