I := 1 A
E := 4 V
ϕ := 90 deg
P := I*E*sin(ϕ) = 4 W
R := 101 Ω
I := E/R = 0.039604 A
p_f := 0.8
f := 50 Hz
X := 0.8*R = 80.8 Ω
C := X == 1/(2*π*f*C) solve, C → 3.9394787894e-5/(Hz*Ω) = 3.93948e-5 F
C = 39.3948 μF
cos(p_f) = 39.9184 deg
Z := sqrt(R^2 + X^2) = 129.343 Ω
43.8/sqrt(2) = 30.9713
E/Z = 30.9255 mA
