# Distributionslinje værdier er:
X_L := 2*π*50*13.6*10^-3 = 4.27257
R_L := 6.2
# Dermed finde linjens impedans til :
Z_L := 6.2 + 4.273j = 6.2 + 4.273i
# Da vi ønsker at spændingen ved forbrugeren kun må variere med 15%, beregnes grænseværdien for hvornår trinsskifteren skal op eller ned i spænding
# Når forbrugerspændingen har en 15% afviselse fra ønsket spændingsniveau, er modstandsværdien for forbrugeren på:
# 15% ned
U := 4
U_2 := 0.9*U
0.9*|U| == |U*R_B/(R + 1j*X_L + R_B)|
R_B := R_B^2*(1 - 1/0.81) + 2*R_L*R_B + X_L^2 == 0 solve, R_B → [-1.43330122339; 54.2964591181]
R_B := 54.3
i := U_2/R_B = 0.0662983
# 5 V trin
U := 5 V
U_2 := U*|R_B/(Z_L + R_B)| = 4.47645 V
i := U_2/R_B = 0.0824393 V
