# Powerfactor beregning ved decentral målenhed ved 54Ω belastning:
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Z_R := 54
Z_L := 6.2 + 4.273j
Z_Load := Z_R + Z_L = 60.2 + 4.273i
I := 4/|Z_Load| = 0.0662784  # A
S_Load := 2.089^2*Z_Load = 262.708 + 18.647i  # VA
P := 215.141  # W
pf := P/|S_Load| = 0.816881
